VAX := READPRN(".\lab_Direct.DNO")
VAX = [
    1.42185e-5, -1.42213e-5;
    0.0200102, -1.41655e-5;
    0.0400061, -1.41095e-5;
    0.0600021, -1.40531e-5;
    0.079998, -1.39961e-5;
    0.0999939, -1.3938e-5;
    0.11999, -1.38784e-5;
    0.139986, -1.38164e-5;
    0.159982, -1.3751e-5;
    0.179978, -1.36804e-5
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]
VAX[:, 0] = [
    1.42185e-5; 0.0200102; 0.0400061; 0.0600021; 0.079998; 0.0999939; 0.11999; 0.139986; 0.159982; 0.179978
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]
VAX[:, 1] = [
    -1.42213e-5; -1.41655e-5; -1.41095e-5; -1.40531e-5; -1.39961e-5; -1.3938e-5; -1.38784e-5; -1.38164e-5; -1.3751e-5; -1.36804e-5
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]
# [plot: VAX[:, 1] vs VAX[:, 0]]
I_d3 := max(VAX[:, 1]) = 0.0330609
n_MAX := match(I_d3, VAX[:, 1]) = [50]
U_d3 := VAX[:, 0][50, :] = [0.966746]
n_Id1 := match(I_d3/4, VAX[:, 1]) = [36; 37]
I_d1 := VAX[:, 1][25, :] = [2.82659e-5]
U_d2 := linterp(VAX[:, 1], VAX[:, 0], I_d3/2) = 0.808252
U_d1 := VAX[:, 0][25, :] = [0.499872]
I_d2 := I_d3/2 = 0.0165304
R_b := (U_d1 - 2*U_d2 + U_d3)/I_d1 = -5302.74
NF_t := (3*U_d2 - 2*U_d1 - U_d3)/ln(2) = [0.66114]
I_so := I_d1*exp((U_d2 - 2*U_d1)/NF_t) = [2.1158e-5]
solve block
    # guess values
    R_b := 1
    I_s0 := 10^-10
    m := 2
    F_t := 0.02
    # constraints
    0.49987 == 0.00003*R_b + ln((I_s0 + 0.00003)/I_s0)*m*F_t
    0.80825 == 0.01653*R_b + ln((I_s0 + 0.01653)/I_s0)*m*F_t
    0.96675 == 0.03306*R_b + ln((I_s0 + 0.03306)/I_s0)*m*F_t
    0.671 == 0.004*R_b + ln((I_s0 + 0.004)/I_s0)*m*F_t
    # solver
    Diod_P := Minerr(I_s0, R_b, m, F_t)
end solve block
Diod_P = [4.88008e-13; 8.17821; 1.65979; 0.0167951]
R_b := 8.20109
NFt := 1.63411*0.01685
I_s0 := 3.69131*10^-13
I_proverka := 0, 10^-5 .. 0.023 = [
    0; 1e-5; 2e-5; 3e-5; 4e-5; 5e-5; 6e-5; 7e-5; 8e-5; 9e-5
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]
U_proverka := I_proverka*R_b + NFt*ln((I_proverka + I_s0)/I_s0) = [
    0; 0.471331; 0.490499; 0.501745; 0.509748; 0.515975; 0.521077; 0.525403; 0.529162; 0.532487
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]
# [plot: I_proverka vs U_proverka]
Rb1 := 1.00000
NFt1 := 0.02753
Is01 := 3.69131*10^-1
Idiod := 0, 10^-5 .. 0.023
Uformula(Idiod) := Idiod*Rb1 + NFt1*ln((Idiod + Is01)/Is01)
VAX := READPRN(".\lab_Direct.DNO")
Idiod := VAX[:, 1]
VAX[:, 0] = [
    1.42185e-5; 0.0200102; 0.0400061; 0.0600021; 0.079998; 0.0999939; 0.11999; 0.139986; 0.159982; 0.179978
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]
VAX[:, 1] = [
    -1.42213e-5; -1.41655e-5; -1.41095e-5; -1.40531e-5; -1.39961e-5; -1.3938e-5; -1.38784e-5; -1.38164e-5; -1.3751e-5; -1.36804e-5
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]
Idiod = [
    -1.42213e-5; -1.41655e-5; -1.41095e-5; -1.40531e-5; -1.39961e-5; -1.3938e-5; -1.38784e-5; -1.38164e-5; -1.3751e-5; -1.36804e-5
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]
VAX[:, 0][45] = 0.876355
Iproverka := VAX[:, 1][45] = 0.0234693
Uformula(Iproverka) = 0.0251663
# [plot: VAX[:, 1], Uformula(Idiod) vs VAX[:, 0]]
